// SBML level 2 version 4

function Rate_R1(k1)
  k1;
end

function Rate_R2(k2, X, Y)
  k2*X*Y*Y;
end

function Rate_R3(Y, k3)
  k3*Y;
end

model Model_1()
  // New Model

  // Compartments:
  compartment compartment_1 = 1;

  // Species:
  species X in compartment_1 = 2;
  species Y in compartment_1 = 1;

  // Reactions:
  reaction_1: => X; compartment_1*Rate_R1(k1);
    k1 = 1.1;
  reaction_2: X => Y; compartment_1*Rate_R2(k2, X, Y);
    k2 = 1.1;
  reaction_3: Y => ; compartment_1*Rate_R3(Y, k3);
    k3 = 0.6;

  // Unit definitions:
  unit volume = 1e-3 litre;
  unit substance = 1e-3 mole;
end
