// SBML level 2 version 1

function Constant_flux__irreversible(v)
  v;
end
Constant_flux__irreversible is "Constant flux (irreversible)";

function Rate_R2_1(k2, X, Y)
  k2*X*Y*Y;
end

model Model_1()
  // New Model

  // Compartments:
  compartment compartment_1 = 1;

  // Species:
  species X in compartment_1 = 2;
  species Y in compartment_1 = 1;

  // Reactions:
  reaction_1: => X; compartment_1*Constant_flux__irreversible(v);
    v = 0.1131562;
  reaction_2: X => Y; compartment_1*Rate_R2_1(k2, X, Y);
    k2 = 0.08943944;
  reaction_3: Y => ; compartment_1*k1*Y;
    k1 = 0.08943944;

  // Unit definitions:
  unit volume = 1e-3 litre;
  unit substance = 1e-3 mole;
end
