// SBML level 2 version 1

function mass_action___reversible_1(Cell, k1, k2, EGF, unboundEGFR, boundEGFR)
  (k1*EGF*unboundEGFR - k2*boundEGFR)/Cell;
end

function mass_action___reversible_2(Cell, k1, k2, boundEGFR, activeSos, inactiveSos)
  (k1*boundEGFR*inactiveSos - k2*activeSos)/Cell;
end

function MM__2__1(Cell, Sos_removedKm_ErkPP, SosKcat_ErkPP, Sos_active_inactiveKm_ErkPP, SosKeq_ErkPP, ERKPP, activeSos, removedSos)
  SosKcat_ErkPP*ERKPP*(activeSos - removedSos/SosKeq_ErkPP)/(Sos_active_inactiveKm_ErkPP*(1 + activeSos/Sos_active_inactiveKm_ErkPP + removedSos/Sos_removedKm_ErkPP))/Cell;
end
MM__2__1 is "MM [2]_1";

function MM__2__2(Cell, Sos_removedKm_ErkPP, SosKcat_ErkPP, Sos_active_inactiveKm_ErkPP, SosKeq_ErkPP, ERKPP, inactiveSos, removedSos)
  SosKcat_ErkPP*ERKPP*(inactiveSos - removedSos/SosKeq_ErkPP)/(Sos_active_inactiveKm_ErkPP*(1 + inactiveSos/Sos_active_inactiveKm_ErkPP + removedSos/Sos_removedKm_ErkPP))/Cell;
end
MM__2__2 is "MM [2]_2";

function MM__reversible__Haldane___1___2__1(Keq, Kmp, Kms, Cell, inactiveC3G, activeC3G, vmax)
  vmax*(activeC3G - inactiveC3G/Keq)/(Kms*(1 + activeC3G/Kms + inactiveC3G/Kmp))/Cell;
end
MM__reversible__Haldane___1___2__1 is "MM (reversible, Haldane) [1] [2]_1";

function MM__2__3(Keq, Kmp, Kms, Cell, kcat, inactiveC3G, activeC3G, boundEGFR)
  kcat*boundEGFR*(inactiveC3G - activeC3G/Keq)/(Kms*(1 + inactiveC3G/Kms + activeC3G/Kmp))/Cell;
end
MM__2__3 is "MM [2]_3";

function MM__2__4(Keq, Kmp, Kms, Cell, kcat, activeRas, activeSos, inactiveRas)
  kcat*activeSos*(inactiveRas - activeRas/Keq)/(Kms*(1 + inactiveRas/Kms + activeRas/Kmp))/Cell;
end
MM__2__4 is "MM [2]_4";

function MM__2__5(Keq, Kmp, Kms, Cell, kcat, activeRas, inactiveRas, GAP)
  kcat*GAP*(activeRas - inactiveRas/Keq)/(Kms*(1 + activeRas/Kms + inactiveRas/Kmp))/Cell;
end
MM__2__5 is "MM [2]_5";

function MM__2__6(Keq, Kmp, Kms, Cell, kcat, BRaf, BRafPP, activeRas)
  kcat*activeRas*(BRaf - BRafPP/Keq)/(Kms*(1 + BRaf/Kms + BRafPP/Kmp))/Cell;
end
MM__2__6 is "MM [2]_6";

function MM__2__7(Keq, Kmp, Kms, Cell, kcat, MEK, MEKPP, BRafPP)
  kcat*BRafPP*(MEK - MEKPP/Keq)/(Kms*(1 + MEK/Kms + MEKPP/Kmp))/Cell;
end
MM__2__7 is "MM [2]_7";

function MM__2__8(Keq, Kmp, Kms, Cell, kcat, MEKPP, ERK, ERKP)
  kcat*MEKPP*(ERK - ERKP/Keq)/(Kms*(1 + ERK/Kms + ERKP/Kmp))/Cell;
end
MM__2__8 is "MM [2]_8";

function MM__reversible__Haldane___1___2__2(Keq, Kmp, Kms, Cell, ERKPP, ERKP, vmax)
  vmax*(ERKPP - ERKP/Keq)/(Kms*(1 + ERKPP/Kms + ERKP/Kmp))/Cell;
end
MM__reversible__Haldane___1___2__2 is "MM (reversible, Haldane) [1] [2]_2";

function MM__reversible__Haldane___1___2__3(Keq, Kmp, Kms, Cell, MEK, MEKPP, vmax)
  vmax*(MEKPP - MEK/Keq)/(Kms*(1 + MEKPP/Kms + MEK/Kmp))/Cell;
end
MM__reversible__Haldane___1___2__3 is "MM (reversible, Haldane) [1] [2]_3";

function MM__2__9(Keq, Kmp, Kms, Cell, kcat, inactiveRap1, activeC3G, activeRap1)
  kcat*activeC3G*(inactiveRap1 - activeRap1/Keq)/(Kms*(1 + inactiveRap1/Kms + activeRap1/Kmp))/Cell;
end
MM__2__9 is "MM [2]_9";

function MM__2__10(Keq, Kmp, Kms, Cell, kcat, inactiveRap1, activeRap1, GAP)
  kcat*GAP*(activeRap1 - inactiveRap1/Keq)/(Kms*(1 + activeRap1/Kms + inactiveRap1/Kmp))/Cell;
end
MM__2__10 is "MM [2]_10";

function MM__reversible__Haldane___1___2__4(Keq, Kmp, Kms, Cell, BRaf, BRafPP, vmax)
  vmax*(BRafPP - BRaf/Keq)/(Kms*(1 + BRafPP/Kms + BRaf/Kmp))/Cell;
end
MM__reversible__Haldane___1___2__4 is "MM (reversible, Haldane) [1] [2]_4";

function MM__2__11(Keq, Kmp, Kms, Cell, kcat, BRaf, BRafPP, activeRap1)
  kcat*activeRap1*(BRaf - BRafPP/Keq)/(Kms*(1 + BRaf/Kms + BRafPP/Kmp))/Cell;
end
MM__2__11 is "MM [2]_11";

function MM__2__12(Keq, Kmp, Kms, Cell, kcat, Raf_1PP, activeRas, Raf_1)
  kcat*activeRas*(Raf_1 - Raf_1PP/Keq)/(Kms*(1 + Raf_1/Kms + Raf_1PP/Kmp))/Cell;
end
MM__2__12 is "MM [2]_12";

function MM__2__13(Keq, Kmp, Kms, Cell, kcat, Raf_1PP, MEK, MEKPP)
  kcat*Raf_1PP*(MEK - MEKPP/Keq)/(Kms*(1 + MEK/Kms + MEKPP/Kmp))/Cell;
end
MM__2__13 is "MM [2]_13";

function MM__reversible__Haldane___1___2__5(Keq, Kmp, Kms, Cell, Raf_1PP, Raf_1, vmax)
  vmax*(Raf_1PP - Raf_1/Keq)/(Kms*(1 + Raf_1PP/Kms + Raf_1/Kmp))/Cell;
end
MM__reversible__Haldane___1___2__5 is "MM (reversible, Haldane) [1] [2]_5";

function MM__2__14(Keq, Kmp, Kms, Cell, kcat, inactiveRap1, activeRap1, EPAC)
  kcat*EPAC*(inactiveRap1 - activeRap1/Keq)/(Kms*(1 + inactiveRap1/Kms + activeRap1/Kmp))/Cell;
end
MM__2__14 is "MM [2]_14";

function MM__2__15(Keq, Kmp, Kms, Cell, kcat, EPAC, EPACA, inactiveEPAC)
  kcat*EPACA*(inactiveEPAC - EPAC/Keq)/(Kms*(1 + inactiveEPAC/Kms + EPAC/Kmp))/Cell;
end
MM__2__15 is "MM [2]_15";

function MM__2__16(Keq, Kmp, Kms, Cell, kcat, EPAC, inactiveEPAC, Cilostamide)
  kcat*Cilostamide*(inactiveEPAC - EPAC/Keq)/(Kms*(1 + inactiveEPAC/Kms + EPAC/Kmp))/Cell;
end
MM__2__16 is "MM [2]_16";

function MM__reversible__Haldane___1___2__6(Keq, Kmp, Kms, Cell, EPAC, inactiveEPAC, vmax)
  vmax*(EPAC - inactiveEPAC/Keq)/(Kms*(1 + EPAC/Kms + inactiveEPAC/Kmp))/Cell;
end
MM__reversible__Haldane___1___2__6 is "MM (reversible, Haldane) [1] [2]_6";

function MM__2__17(Keq, Kmp, Kms, Cell, kcat, activePKA, inactivePKA, PKAA)
  kcat*PKAA*(inactivePKA - activePKA/Keq)/(Kms*(1 + inactivePKA/Kms + activePKA/Kmp))/Cell;
end
MM__2__17 is "MM [2]_17";

function MM__2__18(Keq, Kmp, Kms, Cell, kcat, Cilostamide, activePKA, inactivePKA)
  kcat*Cilostamide*(inactivePKA - activePKA/Keq)/(Kms*(1 + inactivePKA/Kms + activePKA/Kmp))/Cell;
end
MM__2__18 is "MM [2]_18";

function MM__reversible__Haldane___1___2__7(Keq, Kmp, Kms, Cell, activePKA, inactivePKA, vmax)
  vmax*(activePKA - inactivePKA/Keq)/(Kms*(1 + activePKA/Kms + inactivePKA/Kmp))/Cell;
end
MM__reversible__Haldane___1___2__7 is "MM (reversible, Haldane) [1] [2]_7";

function MM__2__19(Keq, Kmp, Kms, Cell, kcat, activePKA, removedRaf1, Raf_1)
  kcat*activePKA*(Raf_1 - removedRaf1/Keq)/(Kms*(1 + Raf_1/Kms + removedRaf1/Kmp))/Cell;
end
MM__2__19 is "MM [2]_19";

function MM__2__20(Keq, Kmp, Kms, Cell, kcat, MEKPP, ERKPP, ERKP)
  kcat*MEKPP*(ERKP - ERKPP/Keq)/(Kms*(1 + ERKP/Kms + ERKPP/Kmp))/Cell;
end
MM__2__20 is "MM [2]_20";

function MM__reversible__Haldane___1___2__8(Keq, Kmp, Kms, Cell, ERK, ERKP, vmax)
  vmax*(ERKP - ERK/Keq)/(Kms*(1 + ERKP/Kms + ERK/Kmp))/Cell;
end
MM__reversible__Haldane___1___2__8 is "MM (reversible, Haldane) [1] [2]_8";

function MM__2__21(Cell, Sos_removedKm_ErkP, SosKcat_ErkP, Sos_active_inactiveKm_ErkP, SosKeq_ErkP, ERKP, activeSos, removedSos)
  SosKcat_ErkP*ERKP*(activeSos - removedSos/SosKeq_ErkP)/(Sos_active_inactiveKm_ErkP*(1 + activeSos/Sos_active_inactiveKm_ErkP + removedSos/Sos_removedKm_ErkP))/Cell;
end
MM__2__21 is "MM [2]_21";

function MM__2__22(Cell, Sos_removedKm_ErkP, SosKcat_ErkP, Sos_active_inactiveKm_ErkP, SosKeq_ErkP, ERKP, inactiveSos, removedSos)
  SosKcat_ErkP*ERKP*(inactiveSos - removedSos/SosKeq_ErkP)/(Sos_active_inactiveKm_ErkP*(1 + inactiveSos/Sos_active_inactiveKm_ErkP + removedSos/Sos_removedKm_ErkP))/Cell;
end
MM__2__22 is "MM [2]_22";

model Model_1()
  // MAP-Signaling Pathway
  // A model of the MAP-Kinase signalling pathway.
  // The most enzyme reactions are assumed to follow a reversible Michaelis-Menten kinetic. However the "total enzyme concentration is not constant. Therefore for each reaction a forward and reverse direction is defined.

  // Compartments:
  compartment Cell = 1;

  // Species:
  species EGF in Cell = 0;
  species unboundEGFR in Cell = 500000000;
  species boundEGFR in Cell = 0;
  species activeSos in Cell = 0;
  species inactiveSos in Cell = 1200000000;
  species removedSos in Cell = 0;
  species inactiveRas in Cell = 1200000000;
  species GAP in Cell = 2400000000;
  species Raf_1 in Cell = 1500000000; Raf_1 is "Raf-1";
  species Raf_1PP in Cell = 0; Raf_1PP is "Raf-1PP";
  species MEK in Cell = 3000000000;
  species MEKPP in Cell = 0;
  species ERK in Cell = 10000000000;
  species ERKPP in Cell = 0;
  species inactiveRap1 in Cell = 1200000000;
  species BRaf in Cell = 1500000000;
  species BRafPP in Cell = 0;
  species inactiveC3G in Cell = 1200000000;
  species activeC3G in Cell = 0;
  species activeRas in Cell = 0;
  species activeRap1 in Cell = 0;
  species EPAC in Cell = 0;
  species EPACA in Cell = 0;
  species inactiveEPAC in Cell = 1000000000;
  species Cilostamide in Cell = 0;
  species activePKA in Cell = 0;
  species inactivePKA in Cell = 1000000000;
  species PKAA in Cell = 0;
  species removedRaf1 in Cell = 0;
  species ERKP in Cell = 0;

  // Parameters:
  Sos_removedKm_ErkPP = 623.2;
  SosKcat_ErkPP = 31.6;
  Sos_active_inactiveKm_ErkPP = 656; Sos_active_inactiveKm_ErkPP is "Sos_active&inactiveKm ErkPP";
  SosKeq_ErkPP = 177;
  Sos_removedKm_ErkP = 2660;
  SosKcat_ErkP = 3.88;
  Sos_active_inactiveKm_ErkP = 2800; Sos_active_inactiveKm_ErkP is "Sos_active&inactiveKm ErkP";
  SosKeq_ErkP = 177;

  // Reactions:
  EGF_Binding: EGF + unboundEGFR -> boundEGFR; Cell*mass_action___reversible_1(Cell, EGF_Binding_k1, EGF_Binding_k2, EGF, unboundEGFR, boundEGFR);
    EGF_Binding_k1 = 0.984451; EGF_Binding_k2 = 0.001968026;
  // The activation of Sos is mainly due to the localication of Sos to the membrane.
  // There is an allosteric activation of Ras.
  // Jun, J. Regulation of Ras Exchange Factors and Cellular Localization of Ras Activation by Lipid Messengers in T Cells, Front Immunol. 2013; 4: 239.
  // Boriack-Sjodin, P. Ann et al. ; The structural basis of the activation of Ras by Sos, Nature 394, 337-343 (23 July 1998)
  // "Since the recruitment of the GRBZIDrk-Sos complex to the receptor appears to serve as the mechanism for the activation of SOS" ; Bar-Agi, The Sos (Son of sevenless) protein, Cell, Volume 5, Issue 4, May–June 1994, Pages 165–169
  Sos_Binding: boundEGFR + inactiveSos -> activeSos; Cell*mass_action___reversible_2(Cell, Sos_Binding_k1, Sos_Binding_k2, boundEGFR, activeSos, inactiveSos);
    Sos_Binding_k1 = 246.5998; Sos_Binding_k2 = 0.09916172;
  Sos_Removal_activeSos_ERKPP: activeSos -> removedSos; Cell*MM__2__1(Cell, Sos_Removal_activeSos_ERKPP_parameter_1, Sos_Removal_activeSos_ERKPP_parameter_2, Sos_Removal_activeSos_ERKPP_parameter_3, Sos_Removal_activeSos_ERKPP_parameter_4, ERKPP, activeSos, removedSos); Sos_Removal_activeSos_ERKPP is "Sos_Removal (activeSos) ERKPP";  // modifiers: ERKPP
    Sos_Removal_activeSos_ERKPP_parameter_1 = 0.09916172; Sos_Removal_activeSos_ERKPP_parameter_2 = 0.09916172; Sos_Removal_activeSos_ERKPP_parameter_3 = 0.09916172; Sos_Removal_activeSos_ERKPP_parameter_4 = 0.09916172;
  // Enzyme is ERKPP
  Sos_Removal_inactiveSos_ERKPP: inactiveSos -> removedSos; Cell*MM__2__2(Cell, Sos_Removal_inactiveSos_ERKPP_parameter_1, Sos_Removal_inactiveSos_ERKPP_parameter_2, Sos_Removal_inactiveSos_ERKPP_parameter_3, Sos_Removal_inactiveSos_ERKPP_parameter_4, ERKPP, inactiveSos, removedSos); Sos_Removal_inactiveSos_ERKPP is "Sos_Removal (inactiveSos) ERKPP";  // modifiers: ERKPP
    Sos_Removal_inactiveSos_ERKPP_parameter_1 = 0.09916172; Sos_Removal_inactiveSos_ERKPP_parameter_2 = 0.09916172; Sos_Removal_inactiveSos_ERKPP_parameter_3 = 0.09916172; Sos_Removal_inactiveSos_ERKPP_parameter_4 = 0.09916172;
  // Hypermethylation causes an inactivation and leads to cervical cancer.
  // -> methylation as inactivation process
  // Inactivation of Crk SH3 domain-binding guanine nucleotide-releasing factor (C3G) in cervical squamous cell carcinoma. Okino, K., Nagai, H., Nakayama, H., Doi, D., Yoneyama, K., Konishi, H., Takeshita, T. Int. J. Gynecol. Cancer (2006) [Pubmed]
  C3G_Inactivation: activeC3G -> inactiveC3G; Cell*MM__reversible__Haldane___1___2__1(C3G_Inactivation_Keq, C3G_Inactivation_Kmp, C3G_Inactivation_Kms, Cell, inactiveC3G, activeC3G, C3G_Inactivation_vmax);
    C3G_Inactivation_Keq = 63.40489; C3G_Inactivation_Kmp = 3580.239; C3G_Inactivation_Kms = 4084.608; C3G_Inactivation_vmax = 1.981708e8;
  // EGFR binding recuits C3G to the membrane, where it can activate Rap
  C3G_Activation: inactiveC3G -> activeC3G; Cell*MM__2__3(C3G_Activation_Keq, C3G_Activation_Kmp, C3G_Activation_Kms, Cell, C3G_Activation_kcat, inactiveC3G, activeC3G, boundEGFR);  // modifiers: boundEGFR
    C3G_Activation_Keq = 82.59771; C3G_Activation_Kmp = 0.4275949; C3G_Activation_Kms = 0.0764117; C3G_Activation_kcat = 29.96885;
  // The activation of Sos is mainly due to the localication of Sos to the membrane.
  // There is an allosteric activation of Ras.
  // Jun, J. Regulation of Ras Exchange Factors and Cellular Localization of Ras Activation by Lipid Messengers in T Cells, Front Immunol. 2013; 4: 239.
  // Boriack-Sjodin, P. Ann et al. ; The structural basis of the activation of Ras by Sos, Nature 394, 337-343 (23 July 1998)
  // allosteric modulation kinetic
  // Groebe D., Screening for positive allosteric modulators of biological targets, Volume 11, Issues 13–14, July 2006, Pages 632–639
  // J., MONOD, J. WYMAN AND J. P. CHANGEUX, On the Nature of Allosteric Transitions : A Plausible Model; J. Mol. Biol. (1965) 12, 88-118
  // http://www.biophysik.ovgu.de/biophysik_media/Downloads/Versuchsanleitungen/bpp_glyko_2012_09.pdf
  // (allosterische Modulation allgemein)
  Ras_Activation: inactiveRas -> activeRas; Cell*MM__2__4(Ras_Activation_Keq, Ras_Activation_Kmp, Ras_Activation_Kms, Cell, Ras_Activation_kcat, activeRas, activeSos, inactiveRas);  // modifiers: activeSos
    Ras_Activation_Keq = 3.695707; Ras_Activation_Kmp = 5.151613e9; Ras_Activation_Kms = 5.42275e9; Ras_Activation_kcat = 0.01008592;
  Ras_Inactivation: activeRas -> inactiveRas; Cell*MM__2__5(Ras_Inactivation_Keq, Ras_Inactivation_Kmp, Ras_Inactivation_Kms, Cell, Ras_Inactivation_kcat, activeRas, inactiveRas, GAP);  // modifiers: GAP
    Ras_Inactivation_Keq = 2.983262; Ras_Inactivation_Kmp = 15.87999; Ras_Inactivation_Kms = 3.734141; Ras_Inactivation_kcat = 4.994209;
  BRaf_Phosphorylation_Ras: BRaf -> BRafPP; Cell*MM__2__6(BRaf_Phosphorylation_Ras_Keq, BRaf_Phosphorylation_Ras_Kmp, BRaf_Phosphorylation_Ras_Kms, Cell, BRaf_Phosphorylation_Ras_kcat, BRaf, BRafPP, activeRas); BRaf_Phosphorylation_Ras is "BRaf_Phosphorylation (Ras)";  // modifiers: activeRas
    BRaf_Phosphorylation_Ras_Keq = 180.449; BRaf_Phosphorylation_Ras_Kmp = 3.137086e9; BRaf_Phosphorylation_Ras_Kms = 1.574093e9; BRaf_Phosphorylation_Ras_kcat = 29.37234;
  MEK_Phosphorylation_BRafPP: MEK -> MEKPP; Cell*MM__2__7(MEK_Phosphorylation_BRafPP_Keq, MEK_Phosphorylation_BRafPP_Kmp, MEK_Phosphorylation_BRafPP_Kms, Cell, MEK_Phosphorylation_BRafPP_kcat, MEK, MEKPP, BRafPP); MEK_Phosphorylation_BRafPP is "MEK_Phosphorylation (BRafPP)";  // modifiers: BRafPP
    MEK_Phosphorylation_BRafPP_Keq = 185.4995; MEK_Phosphorylation_BRafPP_Kmp = 0.05402802; MEK_Phosphorylation_BRafPP_Kms = 0.5356091; MEK_Phosphorylation_BRafPP_kcat = 0.2231686;
  ERK_Phosphorylation1: ERK -> ERKP; Cell*MM__2__8(ERK_Phosphorylation1_Keq, ERK_Phosphorylation1_Kmp, ERK_Phosphorylation1_Kms, Cell, ERK_Phosphorylation1_kcat, MEKPP, ERK, ERKP);  // modifiers: MEKPP
    ERK_Phosphorylation1_Keq = 185.8634; ERK_Phosphorylation1_Kmp = 0.5298708; ERK_Phosphorylation1_Kms = 0.464929; ERK_Phosphorylation1_kcat = 0.5272007;
  ERKPP_Dephosphorylation1: ERKPP -> ERKP; Cell*MM__reversible__Haldane___1___2__2(ERKPP_Dephosphorylation1_Keq, ERKPP_Dephosphorylation1_Kmp, ERKPP_Dephosphorylation1_Kms, Cell, ERKPP, ERKP, ERKPP_Dephosphorylation1_vmax);
    ERKPP_Dephosphorylation1_Keq = 184.1003; ERKPP_Dephosphorylation1_Kmp = 1.18149; ERKPP_Dephosphorylation1_Kms = 1.446203; ERKPP_Dephosphorylation1_vmax = 0.07049096;
  MEKPP_Dephosphorylation: MEKPP -> MEK; Cell*MM__reversible__Haldane___1___2__3(MEKPP_Dephosphorylation_Keq, MEKPP_Dephosphorylation_Kmp, MEKPP_Dephosphorylation_Kms, Cell, MEK, MEKPP, MEKPP_Dephosphorylation_vmax);
    MEKPP_Dephosphorylation_Keq = 194.9271; MEKPP_Dephosphorylation_Kmp = 3487.541; MEKPP_Dephosphorylation_Kms = 3756.754; MEKPP_Dephosphorylation_vmax = 1.267054e10;
  Rap1_Activation_C3G: inactiveRap1 -> activeRap1; Cell*MM__2__9(Rap1_Activation_C3G_Keq, Rap1_Activation_C3G_Kmp, Rap1_Activation_C3G_Kms, Cell, Rap1_Activation_C3G_kcat, inactiveRap1, activeC3G, activeRap1); Rap1_Activation_C3G is "Rap1_Activation (C3G)";  // modifiers: activeC3G
    Rap1_Activation_C3G_Keq = 3.088578; Rap1_Activation_C3G_Kmp = 24.39559; Rap1_Activation_C3G_Kms = 16.33342; Rap1_Activation_C3G_kcat = 0.0008608044;
  Rap1_Inactivation: activeRap1 -> inactiveRap1; Cell*MM__2__10(Rap1_Inactivation_Keq, Rap1_Inactivation_Kmp, Rap1_Inactivation_Kms, Cell, Rap1_Inactivation_kcat, inactiveRap1, activeRap1, GAP);  // modifiers: GAP
    Rap1_Inactivation_Keq = 3.268317; Rap1_Inactivation_Kmp = 10.43442; Rap1_Inactivation_Kms = 25.3522; Rap1_Inactivation_kcat = 7.733067;
  BRaf_Inactivation: BRafPP -> BRaf; Cell*MM__reversible__Haldane___1___2__4(BRaf_Inactivation_Keq, BRaf_Inactivation_Kmp, BRaf_Inactivation_Kms, Cell, BRaf, BRafPP, BRaf_Inactivation_vmax);
    BRaf_Inactivation_Keq = 192.0069; BRaf_Inactivation_Kmp = 3582.794; BRaf_Inactivation_Kms = 3686.863; BRaf_Inactivation_vmax = 3458499;
  BRaf_Phosphorylation_Rap1: BRaf -> BRafPP; Cell*MM__2__11(BRaf_Phosphorylation_Rap1_Keq, BRaf_Phosphorylation_Rap1_Kmp, BRaf_Phosphorylation_Rap1_Kms, Cell, BRaf_Phosphorylation_Rap1_kcat, BRaf, BRafPP, activeRap1); BRaf_Phosphorylation_Rap1 is "BRaf_Phosphorylation (Rap1)";  // modifiers: activeRap1
    BRaf_Phosphorylation_Rap1_Keq = 185.4143; BRaf_Phosphorylation_Rap1_Kmp = 6.281815e9; BRaf_Phosphorylation_Rap1_Kms = 8.790209e9; BRaf_Phosphorylation_Rap1_kcat = 3750603;
  Raf1_Activation: Raf_1 -> Raf_1PP; Cell*MM__2__12(Raf1_Activation_Keq, Raf1_Activation_Kmp, Raf1_Activation_Kms, Cell, Raf1_Activation_kcat, Raf_1PP, activeRas, Raf_1);  // modifiers: activeRas
    Raf1_Activation_Keq = 158.59; Raf1_Activation_Kmp = 1.156762e10; Raf1_Activation_Kms = 1.943822e10; Raf1_Activation_kcat = 63087.08;
  MEK_Phosphorylation_Raf_1PP: MEK -> MEKPP; Cell*MM__2__13(MEK_Phosphorylation_Raf_1PP_Keq, MEK_Phosphorylation_Raf_1PP_Kmp, MEK_Phosphorylation_Raf_1PP_Kms, Cell, MEK_Phosphorylation_Raf_1PP_kcat, Raf_1PP, MEK, MEKPP); MEK_Phosphorylation_Raf_1PP is "MEK_Phosphorylation (Raf-1PP)";  // modifiers: Raf_1PP
    MEK_Phosphorylation_Raf_1PP_Keq = 171.7148; MEK_Phosphorylation_Raf_1PP_Kmp = 0.5586056; MEK_Phosphorylation_Raf_1PP_Kms = 0.9172182; MEK_Phosphorylation_Raf_1PP_kcat = 0.3307913;
  Raf1PP_Inactivation: Raf_1PP -> Raf_1; Cell*MM__reversible__Haldane___1___2__5(Raf1PP_Inactivation_Keq, Raf1PP_Inactivation_Kmp, Raf1PP_Inactivation_Kms, Cell, Raf_1PP, Raf_1, Raf1PP_Inactivation_vmax);
    Raf1PP_Inactivation_Keq = 160.9452; Raf1PP_Inactivation_Kmp = 3880.846; Raf1PP_Inactivation_Kms = 3725.324; Raf1PP_Inactivation_vmax = 1.154407e9;
  Rap1_Activation_EPAC: inactiveRap1 -> activeRap1; Cell*MM__2__14(Rap1_Activation_EPAC_Keq, Rap1_Activation_EPAC_Kmp, Rap1_Activation_EPAC_Kms, Cell, Rap1_Activation_EPAC_kcat, inactiveRap1, activeRap1, EPAC); Rap1_Activation_EPAC is "Rap1-Activation (EPAC)";  // modifiers: EPAC
    Rap1_Activation_EPAC_Keq = 2.520519; Rap1_Activation_EPAC_Kmp = 18.68026; Rap1_Activation_EPAC_Kms = 19.12763; Rap1_Activation_EPAC_kcat = 0.001033715;
  EPAC_Activation_EPACA: inactiveEPAC -> EPAC; Cell*MM__2__15(EPAC_Activation_EPACA_Keq, EPAC_Activation_EPACA_Kmp, EPAC_Activation_EPACA_Kms, Cell, EPAC_Activation_EPACA_kcat, EPAC, EPACA, inactiveEPAC); EPAC_Activation_EPACA is "EPAC_Activation (EPACA)";  // modifiers: EPACA
    EPAC_Activation_EPACA_Keq = 2.821591; EPAC_Activation_EPACA_Kmp = 14.20503; EPAC_Activation_EPACA_Kms = 12.93189; EPAC_Activation_EPACA_kcat = 3.13834;
  EPAC_Activation_Cilostamide: inactiveEPAC -> EPAC; Cell*MM__2__16(EPAC_Activation_Cilostamide_Keq, EPAC_Activation_Cilostamide_Kmp, EPAC_Activation_Cilostamide_Kms, Cell, EPAC_Activation_Cilostamide_kcat, EPAC, inactiveEPAC, Cilostamide); EPAC_Activation_Cilostamide is "EPAC_Activation (Cilostamide)";  // modifiers: Cilostamide
    EPAC_Activation_Cilostamide_Keq = 9699870000; EPAC_Activation_Cilostamide_Kmp = 10000000000; EPAC_Activation_Cilostamide_Kms = 9.214876e9; EPAC_Activation_Cilostamide_kcat = 9.34508;
  EPAC_Inactivation: EPAC -> inactiveEPAC; Cell*MM__reversible__Haldane___1___2__6(EPAC_Inactivation_Keq, EPAC_Inactivation_Kmp, EPAC_Inactivation_Kms, Cell, EPAC, inactiveEPAC, EPAC_Inactivation_vmax);
    EPAC_Inactivation_Keq = 2.103585; EPAC_Inactivation_Kmp = 6398.084; EPAC_Inactivation_Kms = 11637.96; EPAC_Inactivation_vmax = 5.858538e8;
  PKA_Activation_PKAA: inactivePKA -> activePKA; Cell*MM__2__17(PKA_Activation_PKAA_Keq, PKA_Activation_PKAA_Kmp, PKA_Activation_PKAA_Kms, Cell, PKA_Activation_PKAA_kcat, activePKA, inactivePKA, PKAA); PKA_Activation_PKAA is "PKA_Activation (PKAA)";  // modifiers: PKAA
    PKA_Activation_PKAA_Keq = 1.622228; PKA_Activation_PKAA_Kmp = 4.636795; PKA_Activation_PKAA_Kms = 15.29864; PKA_Activation_PKAA_kcat = 0.4222094;
  PKA_Activation_Cilostamide: inactivePKA -> activePKA; Cell*MM__2__18(PKA_Activation_Cilostamide_Keq, PKA_Activation_Cilostamide_Kmp, PKA_Activation_Cilostamide_Kms, Cell, PKA_Activation_Cilostamide_kcat, Cilostamide, activePKA, inactivePKA); PKA_Activation_Cilostamide is "PKA_Activation (Cilostamide)";  // modifiers: Cilostamide
    PKA_Activation_Cilostamide_Keq = 10000000000; PKA_Activation_Cilostamide_Kmp = 2947194500; PKA_Activation_Cilostamide_Kms = 3102310000; PKA_Activation_Cilostamide_kcat = 1.6605;
  PKA_Inactivation: activePKA -> inactivePKA; Cell*MM__reversible__Haldane___1___2__7(PKA_Inactivation_Keq, PKA_Inactivation_Kmp, PKA_Inactivation_Kms, Cell, activePKA, inactivePKA, PKA_Inactivation_vmax);
    PKA_Inactivation_Keq = 1.255168; PKA_Inactivation_Kmp = 7.814654e10; PKA_Inactivation_Kms = 2.039954e10; PKA_Inactivation_vmax = 8.46001e9;
  Raf1_Removal: Raf_1 -> removedRaf1; Cell*MM__2__19(Raf1_Removal_Keq, Raf1_Removal_Kmp, Raf1_Removal_Kms, Cell, Raf1_Removal_kcat, activePKA, removedRaf1, Raf_1);  // modifiers: activePKA
    Raf1_Removal_Keq = 175.9322; Raf1_Removal_Kmp = 31.9199; Raf1_Removal_Kms = 28.00056; Raf1_Removal_kcat = 0.9809285;
  ERK_Phosphorylation2: ERKP -> ERKPP; Cell*MM__2__20(ERK_Phosphorylation2_Keq, ERK_Phosphorylation2_Kmp, ERK_Phosphorylation2_Kms, Cell, ERK_Phosphorylation2_kcat, MEKPP, ERKPP, ERKP);  // modifiers: MEKPP
    ERK_Phosphorylation2_Keq = 184.1789; ERK_Phosphorylation2_Kmp = 0.0585294; ERK_Phosphorylation2_Kms = 0.05169683; ERK_Phosphorylation2_kcat = 1.216764;
  ERKPP_Dephosphorylation2: ERKP -> ERK; Cell*MM__reversible__Haldane___1___2__8(ERKPP_Dephosphorylation2_Keq, ERKPP_Dephosphorylation2_Kmp, ERKPP_Dephosphorylation2_Kms, Cell, ERK, ERKP, ERKPP_Dephosphorylation2_vmax);
    ERKPP_Dephosphorylation2_Keq = 1.534703; ERKPP_Dephosphorylation2_Kmp = 172.4025; ERKPP_Dephosphorylation2_Kms = 1.530507; ERKPP_Dephosphorylation2_vmax = 0.007409287;
  Sos_Removal_activeSos_ERKP: activeSos -> removedSos; Cell*MM__2__21(Cell, Sos_Removal_activeSos_ERKP_parameter_5, Sos_Removal_activeSos_ERKP_parameter_6, Sos_Removal_activeSos_ERKP_parameter_7, Sos_Removal_activeSos_ERKP_parameter_8, ERKP, activeSos, removedSos); Sos_Removal_activeSos_ERKP is "Sos_Removal (activeSos) ERKP";  // modifiers: ERKP
    Sos_Removal_activeSos_ERKP_parameter_5 = 172.4025; Sos_Removal_activeSos_ERKP_parameter_6 = 172.4025; Sos_Removal_activeSos_ERKP_parameter_7 = 172.4025; Sos_Removal_activeSos_ERKP_parameter_8 = 172.4025;
  Sos_Removal_inactiveSos_ERKP: inactiveSos -> removedSos; Cell*MM__2__22(Cell, Sos_Removal_inactiveSos_ERKP_parameter_5, Sos_Removal_inactiveSos_ERKP_parameter_6, Sos_Removal_inactiveSos_ERKP_parameter_7, Sos_Removal_inactiveSos_ERKP_parameter_8, ERKP, inactiveSos, removedSos); Sos_Removal_inactiveSos_ERKP is "Sos_Removal (inactiveSos) ERKP";  // modifiers: ERKP
    Sos_Removal_inactiveSos_ERKP_parameter_5 = 172.4025; Sos_Removal_inactiveSos_ERKP_parameter_6 = 172.4025; Sos_Removal_inactiveSos_ERKP_parameter_7 = 172.4025; Sos_Removal_inactiveSos_ERKP_parameter_8 = 172.4025;

  // Unit definitions:
  unit substance = 1e-6 mole;
end
