// SBML level 2 version 4

function MM_reversible_Haldane_1_2(vmax, S, P, Keq, Kms, Kmp, cell)
  vmax*(S - P/Keq)/(Kms*(1 + S/Kms + P/Kmp))/cell;
end
MM_reversible_Haldane_1_2 is "MM (reversible, Haldane) [1] [2]";

function MM(kcat, E, S, P, Keq, Kms, Kmp, cell)
  kcat*E*(S - P/Keq)/(Kms*(1 + S/Kms + P/Kmp))/cell;
end
MM is "MM [2]";

function mass_action___reversible(k1, k2, product, V, substrate1, substrate2)
  (k1*substrate1*substrate2 - k2*product)/V;
end

model Model_1()
  // MAP-Signaling Pathway
  // A model of the MAP-Kinase signalling pathway.
  // The most enzyme reactions are assumed to follow a reversible Michaelis-Menten kinetic. However the "total enzyme concentration is not constant. Therefore for each reaction a forward and reverse direction is defined.

  // Compartments:
  compartment Cell = 1;

  // Species:
  species EGF in Cell = 0;
  species unboundEGFR in Cell = 500000000;
  species boundEGFR in Cell = 0;
  species activeSos in Cell = 0;
  species inactiveSos in Cell = 1200000000;
  species removedSos in Cell = 0;
  species inactiveRas in Cell = 1200000000;
  species GAP in Cell = 2400000000;
  species Raf_1 in Cell = 1500000000; Raf_1 is "Raf-1";
  species Raf_1PP in Cell = 0; Raf_1PP is "Raf-1PP";
  species MEK in Cell = 3000000000;
  species MEKPP in Cell = 0;
  species ERK in Cell = 10000000000;
  species ERKPP in Cell = 0;
  species inactiveRap1 in Cell = 1200000000;
  species BRaf in Cell = 1500000000;
  species BRafPP in Cell = 0;
  species inactiveC3G in Cell = 1200000000;
  species activeC3G in Cell = 0;
  species activeRas in Cell = 0;
  species activeRap1 in Cell = 0;
  species EPAC in Cell = 0;
  species EPACA in Cell = 0;
  species inactiveEPAC in Cell = 1000000000;
  species Cilostamide in Cell = 0;
  species activePKA in Cell = 0;
  species inactivePKA in Cell = 1000000000;
  species PKAA in Cell = 0;
  species removedRaf1 in Cell = 0;
  species ERKP in Cell = 0;

  // Parameters:
  Sos_removedKm_ErkPP = 623.2;
  SosKcat_ErkPP = 31.6;
  Sos_active_inactiveKm_ErkPP = 656; Sos_active_inactiveKm_ErkPP is "Sos_active&inactiveKm ErkPP";
  SosKeq_ErkPP = 177;
  Sos_removedKm_ErkP = 2660;
  SosKcat_ErkP = 3.88;
  Sos_active_inactiveKm_ErkP = 2800; Sos_active_inactiveKm_ErkP is "Sos_active&inactiveKm ErkP";
  SosKeq_ErkP = 177;

  // Reactions:
  EGF_Binding: EGF + unboundEGFR -> boundEGFR; Cell*mass_action___reversible(EGF_Binding_k1, EGF_Binding_k2, boundEGFR, Cell, EGF, unboundEGFR);
    EGF_Binding_k1 = 1.07; EGF_Binding_k2 = 0.00238;
  // The activation of Sos is mainly due to the localication of Sos to the membrane.
  // There is an allosteric activation of Ras.
  // Jun, J. Regulation of Ras Exchange Factors and Cellular Localization of Ras Activation by Lipid Messengers in T Cells, Front Immunol. 2013; 4: 239.
  // Boriack-Sjodin, P. Ann et al. ; The structural basis of the activation of Ras by Sos, Nature 394, 337-343 (23 July 1998)
  // "Since the recruitment of the GRBZIDrk-Sos complex to the receptor appears to serve as the mechanism for the activation of SOS" ; Bar-Agi, The Sos (Son of sevenless) protein, Cell, Volume 5, Issue 4, May–June 1994, Pages 165–169
  Sos_Binding: boundEGFR + inactiveSos -> activeSos; Cell*mass_action___reversible(Sos_Binding_k1, Sos_Binding_k2, activeSos, Cell, boundEGFR, inactiveSos);
    Sos_Binding_k1 = 147; Sos_Binding_k2 = 0.1488;
  Sos_Removal_activeSos_ERKPP: activeSos -> removedSos; Cell*MM(SosKcat_ErkPP, ERKPP, activeSos, removedSos, SosKeq_ErkPP, Sos_active_inactiveKm_ErkPP, Sos_removedKm_ErkPP, Cell); Sos_Removal_activeSos_ERKPP is "Sos_Removal (activeSos) ERKPP";  // modifiers: ERKPP
  // Enzyme is ERKPP
  Sos_Removal_inactiveSos_ERKPP: inactiveSos -> removedSos; Cell*MM(SosKcat_ErkPP, ERKPP, inactiveSos, removedSos, SosKeq_ErkPP, Sos_active_inactiveKm_ErkPP, Sos_removedKm_ErkPP, Cell); Sos_Removal_inactiveSos_ERKPP is "Sos_Removal (inactiveSos) ERKPP";  // modifiers: ERKPP
  // Hypermethylation causes an inactivation and leads to cervical cancer.
  // -> methylation as inactivation process
  // Inactivation of Crk SH3 domain-binding guanine nucleotide-releasing factor (C3G) in cervical squamous cell carcinoma. Okino, K., Nagai, H., Nakayama, H., Doi, D., Yoneyama, K., Konishi, H., Takeshita, T. Int. J. Gynecol. Cancer (2006) [Pubmed]
  C3G_Inactivation: activeC3G -> inactiveC3G; Cell*MM_reversible_Haldane_1_2(C3G_Inactivation_vmax, activeC3G, inactiveC3G, C3G_Inactivation_Keq, C3G_Inactivation_Kms, C3G_Inactivation_Kmp, Cell);
    C3G_Inactivation_vmax = 2109860000; C3G_Inactivation_Keq = 74.104; C3G_Inactivation_Kms = 3830.7; C3G_Inactivation_Kmp = 3639.2;
  // EGFR binding recuits C3G to the membrane, where it can activate Rap
  C3G_Activation: inactiveC3G -> activeC3G; Cell*MM(C3G_Activation_kcat, boundEGFR, inactiveC3G, activeC3G, C3G_Activation_Keq, C3G_Activation_Kms, C3G_Activation_Kmp, Cell);  // modifiers: boundEGFR
    C3G_Activation_kcat = 20.549; C3G_Activation_Keq = 74.104; C3G_Activation_Kms = 0.1348; C3G_Activation_Kmp = 0.12806;
  // The activation of Sos is mainly due to the localication of Sos to the membrane.
  // There is an allosteric activation of Ras.
  // Jun, J. Regulation of Ras Exchange Factors and Cellular Localization of Ras Activation by Lipid Messengers in T Cells, Front Immunol. 2013; 4: 239.
  // Boriack-Sjodin, P. Ann et al. ; The structural basis of the activation of Ras by Sos, Nature 394, 337-343 (23 July 1998)
  // allosteric modulation kinetic
  // Groebe D., Screening for positive allosteric modulators of biological targets, Volume 11, Issues 13–14, July 2006, Pages 632–639
  // J., MONOD, J. WYMAN AND J. P. CHANGEUX, On the Nature of Allosteric Transitions : A Plausible Model; J. Mol. Biol. (1965) 12, 88-118
  // http://www.biophysik.ovgu.de/biophysik_media/Downloads/Versuchsanleitungen/bpp_glyko_2012_09.pdf
  // (allosterische Modulation allgemein)
  Ras_Activation: inactiveRas -> activeRas; Cell*MM(Ras_Activation_kcat, activeSos, inactiveRas, activeRas, Ras_Activation_Keq, Ras_Activation_Kms, Ras_Activation_Kmp, Cell);  // modifiers: activeSos
    Ras_Activation_kcat = 0.088992; Ras_Activation_Keq = 3.07; Ras_Activation_Kms = 5422800000; Ras_Activation_Kmp = 5151600000;
  Ras_Inactivation: activeRas -> inactiveRas; Cell*MM(Ras_Inactivation_kcat, GAP, activeRas, inactiveRas, Ras_Inactivation_Keq, Ras_Inactivation_Kms, Ras_Inactivation_Kmp, Cell);  // modifiers: GAP
    Ras_Inactivation_kcat = 7.733; Ras_Inactivation_Keq = 3.07; Ras_Inactivation_Kms = 8.58; Ras_Inactivation_Kmp = 8.151;
  BRaf_Phosphorylation_Ras: BRaf -> BRafPP; Cell*MM(BRaf_Phosphorylation_Ras_kcat, activeRas, BRaf, BRafPP, BRaf_Phosphorylation_Ras_Keq, BRaf_Phosphorylation_Ras_Kms, BRaf_Phosphorylation_Ras_Kmp, Cell); BRaf_Phosphorylation_Ras is "BRaf_Phosphorylation (Ras)";  // modifiers: activeRas
    BRaf_Phosphorylation_Ras_kcat = 5.8585; BRaf_Phosphorylation_Ras_Keq = 177; BRaf_Phosphorylation_Ras_Kms = 2432200000; BRaf_Phosphorylation_Ras_Kmp = 2310600000;
  MEK_Phosphorylation_BRafPP: MEK -> MEKPP; Cell*MM(MEK_Phosphorylation_BRafPP_kcat, BRafPP, MEK, MEKPP, MEK_Phosphorylation_BRafPP_Keq, MEK_Phosphorylation_BRafPP_Kms, MEK_Phosphorylation_BRafPP_Kmp, Cell); MEK_Phosphorylation_BRafPP is "MEK_Phosphorylation (BRafPP)";  // modifiers: BRafPP
    MEK_Phosphorylation_BRafPP_kcat = 0.25083; MEK_Phosphorylation_BRafPP_Keq = 177; MEK_Phosphorylation_BRafPP_Kms = 0.275; MEK_Phosphorylation_BRafPP_Kmp = 0.26125;
  ERK_Phosphorylation1: ERK -> ERKP; Cell*MM(ERK_Phosphorylation1_kcat, MEKPP, ERK, ERKP, ERK_Phosphorylation1_Keq, ERK_Phosphorylation1_Kms, ERK_Phosphorylation1_Kmp, Cell);  // modifiers: MEKPP
    ERK_Phosphorylation1_kcat = 0.64843; ERK_Phosphorylation1_Keq = 177; ERK_Phosphorylation1_Kms = 0.476; ERK_Phosphorylation1_Kmp = 0.4522;
  ERKPP_Dephosphorylation1: ERKPP -> ERKP; Cell*MM_reversible_Haldane_1_2(ERKPP_Dephosphorylation1_vmax, ERKPP, ERKP, ERKPP_Dephosphorylation1_Keq, ERKPP_Dephosphorylation1_Kms, ERKPP_Dephosphorylation1_Kmp, Cell);
    ERKPP_Dephosphorylation1_vmax = 0.0332605; ERKPP_Dephosphorylation1_Keq = 177; ERKPP_Dephosphorylation1_Kms = 1.5; ERKPP_Dephosphorylation1_Kmp = 1.425;
  MEKPP_Dephosphorylation: MEKPP -> MEK; Cell*MM_reversible_Haldane_1_2(MEKPP_Dephosphorylation_vmax, MEKPP, MEK, MEKPP_Dephosphorylation_Keq, MEKPP_Dephosphorylation_Kms, MEKPP_Dephosphorylation_Kmp, Cell);
    MEKPP_Dephosphorylation_vmax = 632512000; MEKPP_Dephosphorylation_Keq = 177; MEKPP_Dephosphorylation_Kms = 3830.7; MEKPP_Dephosphorylation_Kmp = 3639.2;
  Rap1_Activation_C3G: inactiveRap1 -> activeRap1; Cell*MM(Rap1_Activation_C3G_kcat, activeC3G, inactiveRap1, activeRap1, Rap1_Activation_C3G_Keq, Rap1_Activation_C3G_Kms, Rap1_Activation_C3G_Kmp, Cell); Rap1_Activation_C3G is "Rap1_Activation (C3G)";  // modifiers: activeC3G
    Rap1_Activation_C3G_kcat = 0.0072; Rap1_Activation_C3G_Keq = 3.07; Rap1_Activation_C3G_Kms = 20.2; Rap1_Activation_C3G_Kmp = 19.19;
  Rap1_Inactivation: activeRap1 -> inactiveRap1; Cell*MM(Rap1_Inactivation_kcat, GAP, activeRap1, inactiveRap1, Rap1_Inactivation_Keq, Rap1_Inactivation_Kms, Rap1_Inactivation_Kmp, Cell);  // modifiers: GAP
    Rap1_Inactivation_kcat = 7.733; Rap1_Inactivation_Keq = 3.07; Rap1_Inactivation_Kms = 8.58; Rap1_Inactivation_Kmp = 8.151;
  BRaf_Inactivation: BRafPP -> BRaf; Cell*MM_reversible_Haldane_1_2(BRaf_Inactivation_vmax, BRafPP, BRaf, BRaf_Inactivation_Keq, BRaf_Inactivation_Kms, BRaf_Inactivation_Kmp, Cell);
    BRaf_Inactivation_vmax = 7593160; BRaf_Inactivation_Keq = 177; BRaf_Inactivation_Kms = 3830.7; BRaf_Inactivation_Kmp = 3639.2;
  BRaf_Phosphorylation_Rap1: BRaf -> BRafPP; Cell*MM(BRaf_Phosphorylation_Rap1_kcat, activeRap1, BRaf, BRafPP, BRaf_Phosphorylation_Rap1_Keq, BRaf_Phosphorylation_Rap1_Kms, BRaf_Phosphorylation_Rap1_Kmp, Cell); BRaf_Phosphorylation_Rap1 is "BRaf_Phosphorylation (Rap1)";  // modifiers: activeRap1
    BRaf_Phosphorylation_Rap1_kcat = 17.211; BRaf_Phosphorylation_Rap1_Keq = 177; BRaf_Phosphorylation_Rap1_Kms = 9665300000; BRaf_Phosphorylation_Rap1_Kmp = 9182000000;
  Raf1_Activation: Raf_1 -> Raf_1PP; Cell*MM(Raf1_Activation_kcat, activeRas, Raf_1, Raf_1PP, Raf1_Activation_Keq, Raf1_Activation_Kms, Raf1_Activation_Kmp, Cell);  // modifiers: activeRas
    Raf1_Activation_kcat = 17.658; Raf1_Activation_Keq = 177; Raf1_Activation_Kms = 5671300000; Raf1_Activation_Kmp = 5387800000;
  MEK_Phosphorylation_Raf_1PP: MEK -> MEKPP; Cell*MM(MEK_Phosphorylation_Raf_1PP_kcat, Raf_1PP, MEK, MEKPP, MEK_Phosphorylation_Raf_1PP_Keq, MEK_Phosphorylation_Raf_1PP_Kms, MEK_Phosphorylation_Raf_1PP_Kmp, Cell); MEK_Phosphorylation_Raf_1PP is "MEK_Phosphorylation (Raf-1PP)";  // modifiers: Raf_1PP
    MEK_Phosphorylation_Raf_1PP_kcat = 0.25083; MEK_Phosphorylation_Raf_1PP_Keq = 177; MEK_Phosphorylation_Raf_1PP_Kms = 0.8; MEK_Phosphorylation_Raf_1PP_Kmp = 0.76;
  Raf1PP_Inactivation: Raf_1PP -> Raf_1; Cell*MM_reversible_Haldane_1_2(Raf1PP_Inactivation_vmax, Raf_1PP, Raf_1, Raf1PP_Inactivation_Keq, Raf1PP_Inactivation_Kms, Raf1PP_Inactivation_Kmp, Cell);
    Raf1PP_Inactivation_vmax = 13119700000; Raf1PP_Inactivation_Keq = 177; Raf1PP_Inactivation_Kms = 3830.7; Raf1PP_Inactivation_Kmp = 3639.2;
  Rap1_Activation_EPAC: inactiveRap1 -> activeRap1; Cell*MM(Rap1_Activation_EPAC_kcat, EPAC, inactiveRap1, activeRap1, Rap1_Activation_EPAC_Keq, Rap1_Activation_EPAC_Kms, Rap1_Activation_EPAC_Kmp, Cell); Rap1_Activation_EPAC is "Rap1-Activation (EPAC)";  // modifiers: EPAC
    Rap1_Activation_EPAC_kcat = 0.0072; Rap1_Activation_EPAC_Keq = 3.07; Rap1_Activation_EPAC_Kms = 20.2; Rap1_Activation_EPAC_Kmp = 19.19;
  EPAC_Activation_EPACA: inactiveEPAC -> EPAC; Cell*MM(EPAC_Activation_EPACA_kcat, EPACA, inactiveEPAC, EPAC, EPAC_Activation_EPACA_Keq, EPAC_Activation_EPACA_Kms, EPAC_Activation_EPACA_Kmp, Cell); EPAC_Activation_EPACA is "EPAC_Activation (EPACA)";  // modifiers: EPACA
    EPAC_Activation_EPACA_kcat = 4.0753; EPAC_Activation_EPACA_Keq = 2; EPAC_Activation_EPACA_Kms = 17.4; EPAC_Activation_EPACA_Kmp = 16.53;
  EPAC_Activation_Cilostamide: inactiveEPAC -> EPAC; Cell*MM(EPAC_Activation_Cilostamide_kcat, Cilostamide, inactiveEPAC, EPAC, EPAC_Activation_Cilostamide_Keq, EPAC_Activation_Cilostamide_Kms, EPAC_Activation_Cilostamide_Kmp, Cell); EPAC_Activation_Cilostamide is "EPAC_Activation (Cilostamide)";  // modifiers: Cilostamide
    EPAC_Activation_Cilostamide_kcat = 9.3451; EPAC_Activation_Cilostamide_Keq = 10000000000; EPAC_Activation_Cilostamide_Kms = 9699900000; EPAC_Activation_Cilostamide_Kmp = 9214900000;
  EPAC_Inactivation: EPAC -> inactiveEPAC; Cell*MM_reversible_Haldane_1_2(EPAC_Inactivation_vmax, EPAC, inactiveEPAC, EPAC_Inactivation_Keq, EPAC_Inactivation_Kms, EPAC_Inactivation_Kmp, Cell);
    EPAC_Inactivation_vmax = 872760000; EPAC_Inactivation_Keq = 2; EPAC_Inactivation_Kms = 8320400000; EPAC_Inactivation_Kmp = 7904300000;
  PKA_Activation_PKAA: inactivePKA -> activePKA; Cell*MM(PKA_Activation_PKAA_kcat, PKAA, inactivePKA, activePKA, PKA_Activation_PKAA_Keq, PKA_Activation_PKAA_Kms, PKA_Activation_PKAA_Kmp, Cell); PKA_Activation_PKAA is "PKA_Activation (PKAA)";  // modifiers: PKAA
    PKA_Activation_PKAA_kcat = 1.201; PKA_Activation_PKAA_Keq = 2; PKA_Activation_PKAA_Kms = 17.4; PKA_Activation_PKAA_Kmp = 16.53;
  PKA_Activation_Cilostamide: inactivePKA -> activePKA; Cell*MM(PKA_Activation_Cilostamide_kcat, Cilostamide, inactivePKA, activePKA, PKA_Activation_Cilostamide_Keq, PKA_Activation_Cilostamide_Kms, PKA_Activation_Cilostamide_Kmp, Cell); PKA_Activation_Cilostamide is "PKA_Activation (Cilostamide)";  // modifiers: Cilostamide
    PKA_Activation_Cilostamide_kcat = 1.6605; PKA_Activation_Cilostamide_Keq = 10000000000; PKA_Activation_Cilostamide_Kms = 3102300000; PKA_Activation_Cilostamide_Kmp = 2947200000;
  PKA_Inactivation: activePKA -> inactivePKA; Cell*MM_reversible_Haldane_1_2(PKA_Inactivation_vmax, activePKA, inactivePKA, PKA_Inactivation_Keq, PKA_Inactivation_Kms, PKA_Inactivation_Kmp, Cell);
    PKA_Inactivation_vmax = 13519000000; PKA_Inactivation_Keq = 2; PKA_Inactivation_Kms = 9681200000; PKA_Inactivation_Kmp = 9197100000;
  Raf1_Removal: Raf_1 -> removedRaf1; Cell*MM(Raf1_Removal_kcat, activePKA, Raf_1, removedRaf1, Raf1_Removal_Keq, Raf1_Removal_Kms, Raf1_Removal_Kmp, Cell);  // modifiers: activePKA
    Raf1_Removal_kcat = 1.92475; Raf1_Removal_Keq = 177; Raf1_Removal_Kms = 42.7; Raf1_Removal_Kmp = 40.565;
  ERK_Phosphorylation2: ERKP -> ERKPP; Cell*MM(ERK_Phosphorylation2_kcat, MEKPP, ERKP, ERKPP, ERK_Phosphorylation2_Keq, ERK_Phosphorylation2_Kms, ERK_Phosphorylation2_Kmp, Cell);  // modifiers: MEKPP
    ERK_Phosphorylation2_kcat = 0.64843; ERK_Phosphorylation2_Keq = 177; ERK_Phosphorylation2_Kms = 0.0466; ERK_Phosphorylation2_Kmp = 0.04427;
  ERKPP_Dephosphorylation2: ERKP -> ERK; Cell*MM_reversible_Haldane_1_2(ERKPP_Dephosphorylation2_vmax, ERKP, ERK, ERKPP_Dephosphorylation2_Keq, ERKPP_Dephosphorylation2_Kms, ERKPP_Dephosphorylation2_Kmp, Cell);
    ERKPP_Dephosphorylation2_vmax = 0.0332605; ERKPP_Dephosphorylation2_Keq = 177; ERKPP_Dephosphorylation2_Kms = 1.5; ERKPP_Dephosphorylation2_Kmp = 1.4269;
  Sos_Removal_activeSos_ERKP: activeSos -> removedSos; Cell*MM(SosKcat_ErkP, ERKP, activeSos, removedSos, SosKeq_ErkP, Sos_active_inactiveKm_ErkP, Sos_removedKm_ErkP, Cell); Sos_Removal_activeSos_ERKP is "Sos_Removal (activeSos) ERKP";  // modifiers: ERKP
  Sos_Removal_inactiveSos_ERKP: inactiveSos -> removedSos; Cell*MM(SosKcat_ErkP, ERKP, inactiveSos, removedSos, SosKeq_ErkP, Sos_active_inactiveKm_ErkP, Sos_removedKm_ErkP, Cell); Sos_Removal_inactiveSos_ERKP is "Sos_Removal (inactiveSos) ERKP";  // modifiers: ERKP

  // Unit definitions:
  unit substance = 1e-6 mole;
end
